j := sqrt(-1)
Given
I11*(R2 + 1/(p*C)) - I*R2 - I22/(p*C) == 0
I22*(R3 + p*L + 1/(p*C)) - I11/(p*C) == 0
Find(I11, I22) → [
    (C*I*L*R2*p^2 + C*I*R2*R3*p + I*R2)/(R2 + R3 + L*p + C*R2*R3*p + C*L*R2*p^2);
    I*R2/(R2 + R3 + L*p + C*R2*R3*p + C*L*R2*p^2)
]
I22(p) := I(p)*R2/(R2 + R3 + L*p + C*R2*R3*p + C*L*R2*p^2)  # error: Эта переменная не определена.
