E := 4
T := 0.00005
f := 1/T
t := 0, T/1000 .. 2*T
Ω := 2*π/T
N := 20
s(t) := if(t ≤ T/2, -2*E*t/T, if(T/2 ≤ t ≤ 3*T/2, 2*E - 2*E*t/T, s(t - T)))
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a0 := 1/T*integral(2*E - 2*E*t/T, t = T/2 .. 3*T/2) simplify → 2.61926472437e-28
