E := 4
N := 15000
T := 0.00005
t := 0, T/1000 .. 2*T
Ω := 2*π/T
bn(n) := 2*E/(π*n)*cos(π*n)
ψn(n) := if(bn(n) > 0, π/2, -π/2)
sv(t) := sum(2*E/(π*n)*cos(n*Ω*t - ψn(n)), n = 1 .. N)
s(t) := if(t ≤ T/2, -2*E*t/T, if(T/2 ≤ t ≤ 3*T/2, 2*E - 2*E*t/T, s(t - T)))
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δ := sqrt(integral((s(t) - sv(t))^2, t = 0 .. T)/integral(s(t)^2, t = 0 .. T))
δ = 0.000259878
δ < 0.05 = 1
ωa := 2*π/T*N = 1.88496e9
