# Спектральный анализ сигнала
E := 4
T := 0.00005
f := 1/T
t := 0, T/1000 .. 2*T
Ω := 2*π/T
s1(t) := if(0 ≤ t ≤ T/2, E, -E)  # Прямоугольный импульс
E - 4*E/T*t if 0 ≤ t ≤ T/2
-E + 4*E/T*t if 0 ≤ t ≤ T/2
(3*E - 4*E*t/T) if T/2 < t ≤ T
s2(t) := if(0 ≤ t ≤ T, E*t/T, 0)  # Пилообразный импульс
(-3*E + 4*E*t/T) if T/2 < t ≤ T
s31(t) := if(0 ≤ t < T/2, E - 4*E/T*t, -3*E + 4*E*t/T)
sk(t - T) if t > T
# Треугольный импульс
s3(t) := if(0 ≤ t ≤ T, s31(t), 0)
s1(t) := if(t ≤ T/2, -2*E*t/T, if(T/2 ≤ t ≤ 3*T/2, 2*E - 2*E*t/T, s1(t - T)))
sp(t) := sum(s1(t - k*T), k = 0 .. 2)
# Формирование периодической
# последовательности из импульсов si(t)
sk(t) :=
    -E + 4*E/T*t if 0 ≤ t ≤ T/2
    (3*E - 4*E*t/T) if T/2 < t ≤ T
    sk(t - T) if t > T
N := 20
n := 0 .. N
# Расчет спектра периодического сигнала
b[n] := 2*integral(s1(t)*sin(n*Ω*t), t = 0 .. T)/T
a[n] := 2*integral(s1(t)*cos(n*Ω*t), t = 0 .. T)/T
a[n] := if(|a[n]| < 10^-5, 0, a[n])
b[n] := if(|b[n]| < 10^-5, 0, b[n])
ψ[n] := if(a[n] == 0, if(b[n] > 0, π/2, -π/2), atan(b[n]/a[n]))
ψ[n] := if(b[n] == 0, if(a[n] > 0, 0, π), ψ[n])
A[n] := sqrt(a[n]^2 + b[n]^2)
A[0] := A[0]/2
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# Временная
# функция
# и спектр
# исходного
# периодического
# сигнала
f = 20000
# Синтез сигнала по Фурье
N1 := 20  # Число гармоник, по которому проводится синтез
# Восстановление временной функции сигнала по N1 гармоникам
sv(t) := A[0] + sum(A[n]*cos(2*π*f*n*t - ψ[n]), n = 1 .. N1)
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# Временная функция сигнала, восстановленного по N1 гармоникам
N1 = 20
# Относительная среднеквадратическая погрешность представления сигнала с помощью N1 гармоник спектра - δ
δ := sqrt(integral((s1(t) - sv(t))^2, t = 0 .. T)/integral(s1(t)^2, t = 0 .. T))
δ = 0.172188
