E := 4
T := 0.00005
f := 1/T
t := 0, T/1000 .. 2*T
Ω := 2*π/T
N := 20
s(t) := if(t ≤ T/2, -2*E*t/T, if(T/2 ≤ t ≤ 3*T/2, 2*E - 2*E*t/T, s(t - T)))
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a0 := 1/T*integral(-2*E*t/T, t = 0 .. T/2) + 1/T*integral(2*E - 2*E*t/T, t = T/2 .. T) simplify → 1.26217744835e-28
a0 := 1/T*integral(2*E - 2*E*t/T, t = T/2 .. T) simplify → 1.0
Given
U11*g1 - U22*g1 == J
-U11*g1 + U22*(g1 + g2 + p*C1 + p*C2) - U44*p*C1 == 0
-U22*p*C2 - U44*g3 == 0
Find(U11, U22, U44) simplify → [
    J*(g1*g3 + g2*g3 + C1*g3*p + C2*g3*p + C1*C2*p^2)/(g1*(g2*g3 + C1*g3*p + C2*g3*p + C1*C2*p^2));
    J*g3/(g2*g3 + C1*g3*p + C2*g3*p + C1*C2*p^2);
    -C2*J*p/(g2*g3 + C1*g3*p + C2*g3*p + C1*C2*p^2)
]
U44(p) := -C2*J*p/(g2*g3 + C1*g3*p + C2*g3*p + C1*C2*p^2)  # error: Эта переменная не определена.
U11(p) := J*(g1*g3 + g2*g3 + C1*g3*p + C2*g3*p + C1*C2*p^2)/(g1*(g2*g3 + C1*g3*p + C2*g3*p + C1*C2*p^2))  # error: Эта переменная не определена.
K(p) := U44(p)/U11(p)  # error: Эта переменная не определена.
-C2*J*p/(g2*g3 + C1*g3*p + C2*g3*p + C1*C2*p^2)/(J*(g1*g3 + g2*g3 + C1*g3*p + C2*g3*p + C1*C2*p^2)/(g1*(g2*g3 + C1*g3*p + C2*g3*p + C1*C2*p^2))) simplify → -C2*g1*p/(g1*g3 + g2*g3 + C1*g3*p + C2*g3*p + C1*C2*p^2)
g1 := 1/80000
g2 := 1/800
g3 := 1/320000
C1 := 16*10^-11
C2 := 16*10^-11
a := g1*g2 + g2*g3
b := C1*g3 + C2*g3
c := C1*C2
q(u) := c*u^2 + b*u + a
q(u) solve, u → [-78125/4 + 78125i*sqrt(1999)/4; -78125/4 - 78125i*sqrt(1999)/4]
|C2*g1*p/(g1*g3 + g2*g3 + C1*g3*p + C2*g3*p + C1*C2*p^2)| simplify → |p|/(500000000000000*|p^2/39062500000000000000 + p/1000000000000000 + 101/25600000000|)
Km(ω) := |-C2*g1*1i*ω/(g1*g3 + g2*g3 + C1*g3*(1i*ω) + C2*g3*(1i*ω) + C1*C2*(1i*ω)^2)|
ψk(ω) := arg(-C2*g1*(1i*ω)/(g1*g3 + g2*g3 + C1*g3*(1i*ω) + C2*g3*(1i*ω) + C1*C2*(1i*ω)^2))
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Ω = 125664
Ω := 2*π/T
Kn(n) := -C2*g1*1i*n*Ω/(g1*g3 + g2*g3 + C1*g3*(1i*(n*Ω)) + C2*g3*(1i*(n*Ω)) + C1*C2*(1i*(n*Ω))^2)
Kmn(n) := C2*g1*n*Ω/sqrt((g1*g3 + g2*g3 - C1*C2*n^2*Ω^2)^2 + (C1*g3*n*Ω + C2*g3*n*Ω)^2)
ψkn(n) := arg(Kn(n))
Kn(n) simplify → -2.51327412287e-10i*n/(1.25663706144e-10i*n + (-4.04258996269e-10*n^2) + 3.9453125e-9)
n := 1 .. 20
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ψ(ω) := 3*π/2 - atan((C1*g3*ω + C2*g3*ω)/(g1*g3 + g2*g3 - C1*C2*ω^2))
K(p) := U44(p)/U11(p) → -C2*g1*p/(g1*g3 + g2*g3 + C1*g3*p + C2*g3*p + C1*C2*p^2)
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