E := 4
T := 0.00005
f := 1/T
t := 0, T/1000 .. 2*T
Ω := 2*π/T
N := 15000
n := 1, 2 .. N
g1 := 1/80000
g2 := 1/800
g3 := 1/320000
C1 := 16*10^-11
bxn(n) := 2*E/(π*n)*cos(π*n)
Axn(n) := 2*E/(π*n)
ψxn(n) := if(bxn(n) > 0, π/2, -π/2)
C2 := 16*10^-11
ax0 := 0
K(n) := C2*g1*1i*(Ω*n)/(C2^2*(1i*(Ω*n))^2 + g1*g3 + g2*g3 + C2*g1*(1i*(Ω*n)) + C1*g3*(1i*(Ω*n)) + C2*g2*(1i*(Ω*n)) + C2*g3*(1i*(Ω*n)) + 2*C1*C2*(1i*(Ω*n))^2)
ay0 := ax0*K(0)
Ayn(n) := Axn(n)*|K(n)|
ψyn(n) := ψxn(n) - arg(K(n))  # Ω*n
x(t) := ax0/2 + sum(Axn(n)*cos(n*Ω*t - ψxn(n)), n = 1 .. N)
y(t) := ay0/2 + sum(Ayn(n)*cos(n*Ω*t - ψyn(n)), n = 1 .. N)
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