E := 4
T := 0.00005
f := 1/T
t := 0, T/1000 .. 2*T
Ω := 2*π/T
N := 20
g1 := 1/80000
g2 := 1/800
g3 := 1/320000
C1 := 16*10^-11
C2 := 16*10^-11
Ω := 2*π/T
bn(n) := 2*E*cos(π*n)/(π*n)
K(n) := -C2*g1*1i*n*Ω/(g1*g3 + g2*g3 + C1*g3*(1i*(n*Ω)) + C2*g3*(1i*(n*Ω)) + C1*C2*(1i*(n*Ω))^2)
Axn(n) := 2*E/(π*n)
ψxn(n) := if(bn(n) > 0, π/2, -π/2)
N1 := 510
n := 0, 1 .. 20
Ayn(n) := Axn(n)*|K(n)|
ψyn(n) := ψxn(n) - arg(K(n))
x(t) := sum(2*E/(π*n)*cos(n*Ω*t - ψxn(n)), n = 1 .. N1)
y(t) := sum(Ayn(n)*cos(n*Ω*t - ψyn(n)), n = 1 .. N1)
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