E := 4
T := 0.00005
f := 1/T
t := 0, T/1000 .. 2*T
Ω := 2*π/T
N1 := 51000
s1(t) := if(t ≤ T/2, -2*E*t/T, if(T/2 ≤ t ≤ 3*T/2, 2*E - 2*E*t/T, s1(t - T)))
bn(n) := 2*E/(π*n)*cos(π*n)
ψn(n) := if(bn(n) > 0, π/2, -π/2)
sv(t) := sum(2*E/(π*n)*cos(n*Ω*t - ψn(n)), n = 1 .. N1)
ψn → function
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δ := sqrt(integral((s1(t) - sv(t))^2, t = 0 .. T)/integral(s1(t)^2, t = 0 .. T))
δ = 0.000173956
